OpenVSP model (file version 5), 32 components.
Geometry view with OpenVSP parameter names; values to 6 digits, angles in degrees, lengths in the model's unit.
Overall bounding box: X_Min=-0.653937 X_Len=1.57148 Y_Min=-2.3354 Y_Len=4.6708 Z_Min=-0.5354 Z_Len=1.3408

Human "HumanGeom"
  location (X Y Z) 0 0 0, rotation 0 -90 0
  mass: Density=1035.37 Shell_Flag=1 Mass_Area=1 Mass_Prior=0
  Anthropometric: Age=18 AutoDensity=1 BMI=23.4352 BMI_pct=0.239597 GenderFlag=1 LenUnit=2 Mass=54.43 MassUnit=1 SitFrac=0.51 Stature=1.524 Stature_pct=0.0935721 Volume=0.0525707

Wing "WingGeom"
  location (X Y Z) -0.45 0 0.19, rotation 0 0 0
  symmetric about XZ
  bounding box size 1.1 4.5 0.160736
  mass: Density=46.868 Shell_Flag=0 Mass_Area=1 Mass_Prior=99
  totals: TotalSpan=4.50274 TotalProjectedSpan=4.5 TotalChord=0.656318 TotalArea=2.64623 TotalAR=7.65238 MAC=0.653716
  root: chord 1.1, twist 0, NACA 63-series A=1 IdealCl=0 ThickChord=0.11
  sections:
    n  Span     Root_Chord  Tip_Chord  Area      Sweep  Sweep_Location  Dihedral  Twist  Twist_Location  tip airfoil
    1  0.68818  1.1         0.56577    0.573175  0      0               -2        0      0.25            as above
    2  1.56319  0.56577     0.393731   0.749941  0      0               -2        0      0.25            as above

Custom "PodMan"
  location (X Y Z) -0.65 0 0, rotation 0 0 0
  bounding box size 1.56754 0.539931 0.391886
  Design: ElbowAngle=0 Height=1.524 HipAngle=0 KneeAngle=0 PresetTrigger=0 Presets=0 ShoulderAngle=0
  custom script PodMan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

Propeller "PropR3"
  location (X Y Z) -0.25 -2 -0.2, rotation 0 0 0
  bounding box size 0.0100043 0.600111 0.600111
  Design: Diameter=0.6 NumBlade=12 Beta34=20 UseBeta34Flag=1 Feather=-3.58629 Rotate=0 Precone=0 ReverseFlag=0 FoldAngle=0 PropMode=0 AF=10.8834 CLi=0.299931 Chord=0.0229295 Solidity=0.0875842 ConstructXoC=0.5 FeatherAxisXoC=0.5 FeatherOffsetXoC=0
  cross sections:
    n  RadiusFrac  shape
    0  0.2         ellipse Ellipse_Height=0.0063786 Ellipse_Width=0.0127572
    1  0.400002    NACA 16-series Chord=0.0100144 IdealCl=0.337293 ThickChord=0
    2  1           NACA 16-series Chord=0.0035736 IdealCl=0.3 ThickChord=0.03
  Chord along r/R (cubic Bezier): 0.2: 0.042524, 0.299825: 0.039027, 0.39965: 0.033368, 0.499475: 0.028087, 0.530271: 0.023916, 0.561067: 0.020768, 0.591864: 0.0184, 0.614961: 0.016606, 0.638058: 0.01524, 0.661155: 0.014194, 0.757437: 0.0134, 0.853718: 0.012805, 0.95: 0.012378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
  Twist along r/R (PCHIP): 0.2: 46.75, 0.695801: 25.8767, 1: 13
  Thick along r/R (PCHIP): 0.2: 0.5, 0.400002: 0, 1: 0.03
  CLI along r/R (cubic Bezier): 0.2: 0.33, 0.271916: 0.329, 0.343832: 0.339204, 0.415748: 0.337, 0.477165: 0.336204, 0.538583: 0.32, 0.6: 0.315, 0.733333: 0.31, 0.866667: 0.305, 1: 0.3

Fuselage "HubR3", child of "PropR3"
  location (X Y Z) -0.075 -2 -0.2, rotation 0 0 180
  bounding box size 0.2 0.12 0.12
  Design: Length=0.2
  cross sections:
    n  XLocPercent  YLocPercent  ZLocPercent  shape
    0  0            0            0            point
    1  0.5          0            0            circle Circle_Diameter=0.12
    2  1            0            0            as above

Fuselage "DuctR3", child of "PropR3"
  location (X Y Z) -0.35 -2 -0.2, rotation 0 0 0
  bounding box size 0.4 0.670799 0.670799
  Design: Length=0.4
  cross sections:
    n  XLocPercent  YLocPercent  ZLocPercent  shape
    0  0            0            0            circle Circle_Diameter=0.6
    1  0.5          0            0            circle Circle_Diameter=0.62
    2  1            0            0            as above

Propeller "PropL1"
  location (X Y Z) -0.25 0.95 -0.18, rotation 0 0 0
  bounding box size 0.0210077 0.601046 0.601046
  Design: Diameter=0.6 NumBlade=12 Beta34=20 UseBeta34Flag=1 Feather=4.46918 Rotate=0 Precone=0 ReverseFlag=0 FoldAngle=0 PropMode=0 AF=22.6869 CLi=0.307842 Chord=0.0387601 Solidity=0.148053 ConstructXoC=0.5 FeatherAxisXoC=0.5 FeatherOffsetXoC=0
  cross sections:
    n  RadiusFrac  shape
    0  0.2         ellipse Ellipse_Height=0.0111061 Ellipse_Width=0.0222123
    1  0.4         NACA 16-series Chord=0.0140539 IdealCl=0.337293 ThickChord=0.33
    2  1           NACA 16-series Chord=0.0079188 IdealCl=0.3 ThickChord=0.13
  Chord along r/R (cubic Bezier): 0.2: 0.074041, 0.266667: 0.0672997, 0.333333: 0.0540904, 0.4: 0.0468463, 0.466667: 0.0396022, 0.533333: 0.0351442, 0.6: 0.0323424, 0.733333: 0.0267389, 0.866667: 0.0264972, 1: 0.026396
  Twist along r/R (cubic Bezier): 0.2: 62.389, 0.266667: 54.577, 0.333333: 39.8399, 0.4: 32.9094, 0.466667: 25.9788, 0.533333: 23.3028, 0.6: 19.7803, 0.733333: 12.7351, 0.866667: 16.0938, 1: 16.34
  Thick along r/R (PCHIP): 0.2: 0.5, 0.4: 0.33, 1: 0.13
  CLI along r/R (cubic Bezier): 0.2: 0.33, 0.266667: 0.329073, 0.333333: 0.337774, 0.4: 0.337293, 0.466667: 0.336813, 0.533333: 0.3175, 0.6: 0.315, 0.733333: 0.31, 0.866667: 0.305, 1: 0.3

Fuselage "DuctL1", child of "PropL1"
  location (X Y Z) -0.35 0.95 -0.18, rotation 0 0 0
  bounding box size 0.4 0.670799 0.670799
  Design: Length=0.4
  cross sections:
    n  XLocPercent  YLocPercent  ZLocPercent  shape
    0  0            0            0            circle Circle_Diameter=0.6
    1  0.5          0            0            circle Circle_Diameter=0.62
    2  1            0            0            as above

Fuselage "HubL1", child of "PropL1"
  location (X Y Z) -0.075 0.95 -0.18, rotation 0 0 180
  bounding box size 0.2 0.12 0.12
  Design: Length=0.2
  cross sections:
    n  XLocPercent  YLocPercent  ZLocPercent  shape
    0  0            0            0            point
    1  0.5          0            0            circle Circle_Diameter=0.12
    2  1            0            0            as above

Propeller "PropL3"
  location (X Y Z) -0.25 1.5 0.47, rotation 0 0 0
  bounding box size 0.0298325 0.593751 0.599306
  Design: Diameter=0.6 NumBlade=11 Beta34=20 UseBeta34Flag=1 Feather=0 Rotate=0 Precone=0 ReverseFlag=0 FoldAngle=0 PropMode=0 AF=148.919 CLi=0.299931 Chord=0.177656 Solidity=0.622047 ConstructXoC=0.5 FeatherAxisXoC=0.5 FeatherOffsetXoC=0
  cross sections:
    n  RadiusFrac  shape
    0  0.2         ellipse Ellipse_Height=0.012 Ellipse_Width=0.024
    1  0.400002    NACA 16-series Chord=0.0498752 IdealCl=0.337293 ThickChord=0.200037
    2  1           NACA 16-series Chord=0.039 IdealCl=0.3 ThickChord=0.03
  Chord along r/R (cubic Bezier): 0.2: 0.08, 0.333333: 0.15, 0.466667: 0.2, 0.6: 0.2, 0.716667: 0.2, 0.833333: 0.2, 0.95: 0.2, 0.966667: 0.2, 0.983333: 0.2, 1: 0.13
  Twist along r/R (PCHIP): 0.2: 46.75, 0.75: 20, 1: 13
  Thick along r/R (cubic Bezier): 0.2: 0.5, 0.2667: 0.3, 0.333401: 0.225, 0.400101: 0.2, 0.466734: 0.125, 0.533367: 0.115, 0.6: 0.1, 0.733333: 0.075, 0.866667: 0.055, 1: 0.03
  CLI along r/R (cubic Bezier): 0.2: 0.33, 0.271916: 0.329, 0.343832: 0.339204, 0.415748: 0.337, 0.477165: 0.336204, 0.538583: 0.32, 0.6: 0.315, 0.733333: 0.31, 0.866667: 0.305, 1: 0.3

Fuselage "HubL3", child of "PropL3"
  location (X Y Z) -0.075 1.5 0.47, rotation 0 0 180
  bounding box size 0.2 0.12 0.12
  Design: Length=0.2
  cross sections:
    n  XLocPercent  YLocPercent  ZLocPercent  shape
    0  0            0            0            point
    1  0.5          0            0            circle Circle_Diameter=0.12
    2  1            0            0            as above

Fuselage "DuctL3", child of "PropL3"
  location (X Y Z) -0.35 1.5 0.47, rotation 0 0 0
  bounding box size 0.4 0.670799 0.670799
  Design: Length=0.4
  cross sections:
    n  XLocPercent  YLocPercent  ZLocPercent  shape
    0  0            0            0            circle Circle_Diameter=0.6
    1  0.5          0            0            circle Circle_Diameter=0.62
    2  1            0            0            as above

Propeller "PropR1"
  location (X Y Z) -0.25 -0.95 -0.18, rotation 0 0 0
  bounding box size 0.0296694 0.593751 0.599306
  Design: Diameter=0.6 NumBlade=11 Beta34=20 UseBeta34Flag=1 Feather=0 Rotate=0 Precone=0 ReverseFlag=0 FoldAngle=0 PropMode=0 AF=151.538 CLi=0.307842 Chord=0.177656 Solidity=0.622047 ConstructXoC=0.5 FeatherAxisXoC=0.5 FeatherOffsetXoC=0
  cross sections:
    n  RadiusFrac  shape
    0  0.2         ellipse Ellipse_Height=0.012 Ellipse_Width=0.024
    1  0.4         NACA 16-series Chord=0.049875 IdealCl=0.337293 ThickChord=0.144074
    2  1           NACA 16-series Chord=0.039 IdealCl=0.3 ThickChord=0.03
  Chord along r/R (cubic Bezier): 0.2: 0.08, 0.333333: 0.15, 0.466667: 0.2, 0.6: 0.2, 0.666667: 0.2, 0.733333: 0.2, 0.8: 0.2, 0.833333: 0.2, 0.866667: 0.2, 0.9: 0.2, 0.916667: 0.2, 0.933333: 0.2, 0.95: 0.2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
  Twist along r/R (cubic Bezier): 0.2: 46.75, 0.466667: 29.997, 0.733333: 18.747, 1: 13
  Thick along r/R (cubic Bezier): 0.2: 0.5, 0.266667: 0.1, 0.333333: 0.17037, 0.4: 0.144074, 0.466667: 0.117778, 0.533333: 0.1125, 0.6: 0.1, 0.733333: 0.075, 0.866667: 0.055, 1: 0.03
  CLI along r/R (cubic Bezier): 0.2: 0.33, 0.266667: 0.329073, 0.333333: 0.337774, 0.4: 0.337293, 0.466667: 0.336813, 0.533333: 0.3175, 0.6: 0.315, 0.733333: 0.31, 0.866667: 0.305, 1: 0.3

Fuselage "DuctR1", child of "PropR1"
  location (X Y Z) -0.35 -0.95 -0.18, rotation 0 0 0
  bounding box size 0.4 0.670799 0.670799
  Design: Length=0.4
  cross sections:
    n  XLocPercent  YLocPercent  ZLocPercent  shape
    0  0            0            0            circle Circle_Diameter=0.6
    1  0.5          0            0            circle Circle_Diameter=0.62
    2  1            0            0            as above

Fuselage "HubR1", child of "PropR1"
  location (X Y Z) -0.075 -0.95 -0.18, rotation 0 0 180
  bounding box size 0.2 0.12 0.12
  Design: Length=0.2
  cross sections:
    n  XLocPercent  YLocPercent  ZLocPercent  shape
    0  0            0            0            point
    1  0.5          0            0            circle Circle_Diameter=0.12
    2  1            0            0            as above

Propeller "PropR2"
  location (X Y Z) -0.25 -1.5 0.47, rotation 0 0 0
  bounding box size 0.0296597 0.593751 0.599306
  Design: Diameter=0.6 NumBlade=11 Beta34=20 UseBeta34Flag=1 Feather=0 Rotate=0 Precone=0 ReverseFlag=0 FoldAngle=0 PropMode=0 AF=151.538 CLi=0.307969 Chord=0.177656 Solidity=0.622047 ConstructXoC=0.5 FeatherAxisXoC=0.5 FeatherOffsetXoC=0
  cross sections:
    n  RadiusFrac  shape
    0  0.2         ellipse Ellipse_Height=0.012 Ellipse_Width=0.024
    1  0.4         NACA 16-series Chord=0.049875 IdealCl=0.337293 ThickChord=0.144074
    2  1           NACA 16-series Chord=0.039 IdealCl=0.3 ThickChord=0.03
  Chord along r/R (cubic Bezier): 0.2: 0.08, 0.333333: 0.15, 0.466667: 0.2, 0.6: 0.2, 0.716667: 0.2, 0.833333: 0.2, 0.95: 0.2, 0.966667: 0.2, 0.983333: 0.2, 1: 0.13
  Twist along r/R (PCHIP): 0.2: 46.75, 0.75: 20, 1: 13
  Thick along r/R (cubic Bezier): 0.2: 0.5, 0.233333: 0.3, 0.266667: 0.225, 0.3: 0.2, 0.4: 0.125, 0.5: 0.115, 0.6: 0.1, 0.733333: 0.075, 0.866667: 0.055, 1: 0.03
  CLI along r/R (cubic Bezier): 0.2: 0.33, 0.271916: 0.329, 0.343832: 0.339204, 0.415748: 0.337, 0.477165: 0.336204, 0.538583: 0.32, 0.6: 0.315, 0.733333: 0.31, 0.866667: 0.305, 1: 0.3

Fuselage "DuctR2", child of "PropR2"
  location (X Y Z) -0.35 -1.5 0.47, rotation 0 0 0
  bounding box size 0.4 0.670799 0.670799
  Design: Length=0.4
  cross sections:
    n  XLocPercent  YLocPercent  ZLocPercent  shape
    0  0            0            0            circle Circle_Diameter=0.6
    1  0.5          0            0            circle Circle_Diameter=0.62
    2  1            0            0            as above

Fuselage "HubR2", child of "PropR2"
  location (X Y Z) -0.075 -1.5 0.47, rotation 0 0 180
  bounding box size 0.2 0.12 0.12
  Design: Length=0.2
  cross sections:
    n  XLocPercent  YLocPercent  ZLocPercent  shape
    0  0            0            0            point
    1  0.5          0            0            circle Circle_Diameter=0.12
    2  1            0            0            as above

Propeller "PropL2"
  location (X Y Z) -0.25 2 -0.2, rotation 0 0 0
  bounding box size 0.0298325 0.593751 0.599306
  Design: Diameter=0.6 NumBlade=11 Beta34=20 UseBeta34Flag=1 Feather=0 Rotate=0 Precone=0 ReverseFlag=0 FoldAngle=0 PropMode=0 AF=148.919 CLi=0.299931 Chord=0.177656 Solidity=0.622047 ConstructXoC=0.5 FeatherAxisXoC=0.5 FeatherOffsetXoC=0
  cross sections:
    n  RadiusFrac  shape
    0  0.2         ellipse Ellipse_Height=0.012 Ellipse_Width=0.024
    1  0.400002    NACA 16-series Chord=0.0498752 IdealCl=0.337293 ThickChord=0.200037
    2  1           NACA 16-series Chord=0.039 IdealCl=0.3 ThickChord=0.03
  blade curves as in "PropL3"

Fuselage "HubL2", child of "PropL2"
  location (X Y Z) -0.075 2 -0.2, rotation 0 0 180
  bounding box size 0.2 0.12 0.12
  Design: Length=0.2
  cross sections:
    n  XLocPercent  YLocPercent  ZLocPercent  shape
    0  0            0            0            point
    1  0.5          0            0            circle Circle_Diameter=0.12
    2  1            0            0            as above

Fuselage "DuctL2", child of "PropL2"
  location (X Y Z) -0.35 2 -0.2, rotation 0 0 0
  bounding box size 0.4 0.670799 0.670799
  Design: Length=0.4
  cross sections:
    n  XLocPercent  YLocPercent  ZLocPercent  shape
    0  0            0            0            circle Circle_Diameter=0.6
    1  0.5          0            0            circle Circle_Diameter=0.62
    2  1            0            0            as above

Propeller "Prop17"
  location (X Y Z) -0.25 2 -0.2, rotation 0 0 0
  bounding box size 0.0100043 0.600111 0.600111
  Design: Diameter=0.6 NumBlade=12 Beta34=20 UseBeta34Flag=1 Feather=-3.58629 Rotate=0 Precone=0 ReverseFlag=0 FoldAngle=0 PropMode=0 AF=10.8834 CLi=0.299931 Chord=0.0229295 Solidity=0.0875842 ConstructXoC=0.5 FeatherAxisXoC=0.5 FeatherOffsetXoC=0
  cross sections:
    n  RadiusFrac  shape
    0  0.2         ellipse Ellipse_Height=0.0063786 Ellipse_Width=0.0127572
    1  0.400002    NACA 16-series Chord=0.0100144 IdealCl=0.337293 ThickChord=0
    2  1           NACA 16-series Chord=0.0035736 IdealCl=0.3 ThickChord=0.03
  blade curves as in "PropR3"

Propeller "PropR3", child of "Prop17"
  location (X Y Z) -0.25 -2 -0.2, rotation 0 0 0
  bounding box size 0.0100043 0.600111 0.600111
  Design: Diameter=0.6 NumBlade=12 Beta34=20 UseBeta34Flag=1 Feather=-3.58629 Rotate=0 Precone=0 ReverseFlag=0 FoldAngle=0 PropMode=0 AF=10.8834 CLi=0.299931 Chord=0.0229295 Solidity=0.0875842 ConstructXoC=0.5 FeatherAxisXoC=0.5 FeatherOffsetXoC=0
  cross sections:
    n  RadiusFrac  shape
    0  0.2         ellipse Ellipse_Height=0.0063786 Ellipse_Width=0.0127572
    1  0.400002    NACA 16-series Chord=0.0100144 IdealCl=0.337293 ThickChord=0
    2  1           NACA 16-series Chord=0.0035736 IdealCl=0.3 ThickChord=0.03
  blade curves as in "PropR3"

Propeller "PropR3", child of "Prop17"
  location (X Y Z) -0.25 -1.5 0.47, rotation 0 0 0
  bounding box size 0.0100043 0.600111 0.600111
  Design: Diameter=0.6 NumBlade=12 Beta34=20 UseBeta34Flag=1 Feather=-3.58629 Rotate=0 Precone=0 ReverseFlag=0 FoldAngle=0 PropMode=0 AF=10.8834 CLi=0.299931 Chord=0.0229295 Solidity=0.0875842 ConstructXoC=0.5 FeatherAxisXoC=0.5 FeatherOffsetXoC=0
  cross sections:
    n  RadiusFrac  shape
    0  0.2         ellipse Ellipse_Height=0.0063786 Ellipse_Width=0.0127572
    1  0.400002    NACA 16-series Chord=0.0100144 IdealCl=0.337293 ThickChord=0
    2  1           NACA 16-series Chord=0.0035736 IdealCl=0.3 ThickChord=0.03
  blade curves as in "PropR3"

Propeller "PropR3", child of "Prop17"
  location (X Y Z) -0.25 1.5 0.47, rotation 0 0 0
  bounding box size 0.0100043 0.600111 0.600111
  Design: Diameter=0.6 NumBlade=12 Beta34=20 UseBeta34Flag=1 Feather=-3.58629 Rotate=0 Precone=0 ReverseFlag=0 FoldAngle=0 PropMode=0 AF=10.8834 CLi=0.299931 Chord=0.0229295 Solidity=0.0875842 ConstructXoC=0.5 FeatherAxisXoC=0.5 FeatherOffsetXoC=0
  cross sections:
    n  RadiusFrac  shape
    0  0.2         ellipse Ellipse_Height=0.0063786 Ellipse_Width=0.0127572
    1  0.400002    NACA 16-series Chord=0.0100144 IdealCl=0.337293 ThickChord=0
    2  1           NACA 16-series Chord=0.0035736 IdealCl=0.3 ThickChord=0.03
  blade curves as in "PropR3"

Propeller "PropR3", child of "Prop17"
  location (X Y Z) -0.25 0.95 -0.18, rotation 0 0 0
  bounding box size 0.0100043 0.600111 0.600111
  Design: Diameter=0.6 NumBlade=12 Beta34=20 UseBeta34Flag=1 Feather=-3.58629 Rotate=0 Precone=0 ReverseFlag=0 FoldAngle=0 PropMode=0 AF=10.8834 CLi=0.299931 Chord=0.0229295 Solidity=0.0875842 ConstructXoC=0.5 FeatherAxisXoC=0.5 FeatherOffsetXoC=0
  cross sections:
    n  RadiusFrac  shape
    0  0.2         ellipse Ellipse_Height=0.0063786 Ellipse_Width=0.0127572
    1  0.400002    NACA 16-series Chord=0.0100144 IdealCl=0.337293 ThickChord=0
    2  1           NACA 16-series Chord=0.0035736 IdealCl=0.3 ThickChord=0.03
  blade curves as in "PropR3"

Propeller "PropR3", child of "Prop17"
  location (X Y Z) -0.25 -0.95 -0.18, rotation 0 0 0
  bounding box size 0.0100043 0.600111 0.600111
  Design: Diameter=0.6 NumBlade=12 Beta34=20 UseBeta34Flag=1 Feather=-3.58629 Rotate=0 Precone=0 ReverseFlag=0 FoldAngle=0 PropMode=0 AF=10.8834 CLi=0.299931 Chord=0.0229295 Solidity=0.0875842 ConstructXoC=0.5 FeatherAxisXoC=0.5 FeatherOffsetXoC=0
  cross sections:
    n  RadiusFrac  shape
    0  0.2         ellipse Ellipse_Height=0.0063786 Ellipse_Width=0.0127572
    1  0.400002    NACA 16-series Chord=0.0100144 IdealCl=0.337293 ThickChord=0
    2  1           NACA 16-series Chord=0.0035736 IdealCl=0.3 ThickChord=0.03
  blade curves as in "PropR3"

Propeller "Prop20"
  location (X Y Z) -0.25 -0.95 -0.18, rotation 0 0 0
  bounding box size 0.0210077 0.601046 0.601046
  Design: Diameter=0.6 NumBlade=12 Beta34=20 UseBeta34Flag=1 Feather=4.46918 Rotate=0 Precone=0 ReverseFlag=0 FoldAngle=0 PropMode=0 AF=22.6869 CLi=0.307842 Chord=0.0387601 Solidity=0.148053 ConstructXoC=0.5 FeatherAxisXoC=0.5 FeatherOffsetXoC=0
  cross sections:
    n  RadiusFrac  shape
    0  0.2         ellipse Ellipse_Height=0.0111061 Ellipse_Width=0.0222123
    1  0.4         NACA 16-series Chord=0.0140539 IdealCl=0.337293 ThickChord=0.33
    2  1           NACA 16-series Chord=0.0079188 IdealCl=0.3 ThickChord=0.13
  blade curves as in "PropL1"

Propeller "PropL1", child of "Prop20"
  location (X Y Z) -0.25 -2 -0.2, rotation 0 0 0
  bounding box size 0.0210077 0.601046 0.601046
  Design: Diameter=0.6 NumBlade=12 Beta34=20 UseBeta34Flag=1 Feather=4.46918 Rotate=0 Precone=0 ReverseFlag=0 FoldAngle=0 PropMode=0 AF=22.6869 CLi=0.307842 Chord=0.0387601 Solidity=0.148053 ConstructXoC=0.5 FeatherAxisXoC=0.5 FeatherOffsetXoC=0
  cross sections:
    n  RadiusFrac  shape
    0  0.2         ellipse Ellipse_Height=0.0111061 Ellipse_Width=0.0222123
    1  0.4         NACA 16-series Chord=0.0140539 IdealCl=0.337293 ThickChord=0.33
    2  1           NACA 16-series Chord=0.0079188 IdealCl=0.3 ThickChord=0.13
  blade curves as in "PropL1"

Propeller "PropL1", child of "Prop20"
  location (X Y Z) -0.25 2 -0.2, rotation 0 0 0
  bounding box size 0.0210077 0.601046 0.601046
  Design: Diameter=0.6 NumBlade=12 Beta34=20 UseBeta34Flag=1 Feather=4.46918 Rotate=0 Precone=0 ReverseFlag=0 FoldAngle=0 PropMode=0 AF=22.6869 CLi=0.307842 Chord=0.0387601 Solidity=0.148053 ConstructXoC=0.5 FeatherAxisXoC=0.5 FeatherOffsetXoC=0
  cross sections:
    n  RadiusFrac  shape
    0  0.2         ellipse Ellipse_Height=0.0111061 Ellipse_Width=0.0222123
    1  0.4         NACA 16-series Chord=0.0140539 IdealCl=0.337293 ThickChord=0.33
    2  1           NACA 16-series Chord=0.0079188 IdealCl=0.3 ThickChord=0.13
  blade curves as in "PropL1"

Propeller "PropL1", child of "Prop20"
  location (X Y Z) -0.25 -1.5 0.47, rotation 0 0 0
  bounding box size 0.0210077 0.601046 0.601046
  Design: Diameter=0.6 NumBlade=12 Beta34=20 UseBeta34Flag=1 Feather=4.46918 Rotate=0 Precone=0 ReverseFlag=0 FoldAngle=0 PropMode=0 AF=22.6869 CLi=0.307842 Chord=0.0387601 Solidity=0.148053 ConstructXoC=0.5 FeatherAxisXoC=0.5 FeatherOffsetXoC=0
  cross sections:
    n  RadiusFrac  shape
    0  0.2         ellipse Ellipse_Height=0.0111061 Ellipse_Width=0.0222123
    1  0.4         NACA 16-series Chord=0.0140539 IdealCl=0.337293 ThickChord=0.33
    2  1           NACA 16-series Chord=0.0079188 IdealCl=0.3 ThickChord=0.13
  blade curves as in "PropL1"

Propeller "PropL1", child of "Prop20"
  location (X Y Z) -0.25 1.5 0.47, rotation 0 0 0
  bounding box size 0.0210077 0.601046 0.601046
  Design: Diameter=0.6 NumBlade=12 Beta34=20 UseBeta34Flag=1 Feather=4.46918 Rotate=0 Precone=0 ReverseFlag=0 FoldAngle=0 PropMode=0 AF=22.6869 CLi=0.307842 Chord=0.0387601 Solidity=0.148053 ConstructXoC=0.5 FeatherAxisXoC=0.5 FeatherOffsetXoC=0
  cross sections:
    n  RadiusFrac  shape
    0  0.2         ellipse Ellipse_Height=0.0111061 Ellipse_Width=0.0222123
    1  0.4         NACA 16-series Chord=0.0140539 IdealCl=0.337293 ThickChord=0.33
    2  1           NACA 16-series Chord=0.0079188 IdealCl=0.3 ThickChord=0.13
  blade curves as in "PropL1"

VSPAERO settings (reference component "WingGeom"): Sref=2.64623 bref=4.50274 cref=0.656318 Xcg=-0.475278 Ycg=-1.60135e-07 Zcg=0.00736957 AlphaStart=8.94 AlphaEnd=9.0713 AlphaNpts=1 BetaStart=0 BetaEnd=0 BetaNpts=1 MachStart=0.08 MachEnd=0 MachNpts=1 ReCref=1.20078e+06 Vinf=1 Rho=1.16745
